// COMSOL Multiphysics 6.2.0.290 model "eshape2.mph"
// Outline of the model tree

Geometry
  geom1 "几何 1" (2D, length unit m)
    sq1: Square "正方形 1"
    sq2: Square "正方形 2" | pos = {0, 0.3}; size = 0.4
    r2: Rectangle "矩形 2" | pos = {0.1, 0.4}; size = {0.1, 0.2}
    r3: Rectangle "矩形 3" | pos = {0.2, 0.4}; size = {0.1, 0.2}
    fin: Finalize "形成联合体"

Materials
  mat3: Common "air" on domains 1, 4
    def "基本"
      relpermittivity = 1
      electricconductivity = 0
      relpermeability = 1
  mat4: Common "coil" on domains 3
    def "基本"
      electricconductivity = 1e10
      relpermittivity = 1
      relpermeability = 100
  mat5: Common "iron" on domains 2
    def "基本"
      electricconductivity = 0
      relpermittivity = 100
      relpermeability = 100

Physics
  mf: InductionCurrents "磁场" on domains 1-4
    dependent variable A = {Ax, Ay, Az}
    fsp1: FreeSpace "自由空间 1" (default)
    mi1: MagneticInsulation "磁绝缘 1" (default)
    init1: init "初始值 1" (default)
    mp1: MagneticPotential "磁势 1" on boundaries 1-3, 5, 7, 16
    coil1: Coil "线圈 1" on domains 3 | ICoil = 20[A]; mur_mat = userdef; mur = 1; epsilonr_mat = PorousMedia
    symp1: SymmetryPlane "对称平面 1" on boundaries 1-3, 5, 7, 16

Mesh
  mesh1 "网格 1" (physics-controlled)
    size: MeshSizeDefault "大小" | hauto = 1

Studies
  std1 "研究 1"
    stat: Stationary "稳态"

Solver configurations
  sol1 "解 1" (study std1)
    v1: Variables "因变量 1"
    s1: Stationary "稳态求解器 1"
      dDef: Direct "直接"
      fc1: FullyCoupled "全耦合 1" | linsolver = dDef

Datasets
  dset1: Solution | solution = sol1

Derived values
  gev1: EvalGlobal "全局计算 1" | data = dset1

Plots
  pg1: PlotGroup2D "磁通密度模 (mf)" | data = dset1
    surf1: Surface "表面 1" | expr = mf.normB
    str1: Streamline "流线 1" on boundaries 1-16 | expr = {mf.Bx, mf.By}; udist = 0.03
      col1: Color "颜色表达式 1" | expr = mf.normB
      filt1: Filter "过滤器 1" | expr = !isScalingSystemDomain
    con1: Contour "等值线 1" | expr = mf.Az; levelrounding = off
      filt1: Filter "过滤器 1" | expr = !isScalingSystemDomain
  pg2: PlotGroup2D "Az" | data = dset1
    surf1: Surface "表面 1" | expr = mf.Az
  pg3: PlotGroup2D "normH" | data = dset1
    surf1: Surface "表面 1" | expr = mf.normH
  pg4: PlotGroup2D "二维绘图组 4" | data = dset1
    surf1: Surface "表面 1" | expr = mf.Hy