// COMSOL Multiphysics 6.2.0.290 model "slot.mph"
// Outline of the model tree

Geometry
  geom1 "几何 1" (2D, length unit cm)
    r1: Rectangle "矩形 1" | size = {0.8, 1.6}
    r2: Rectangle "矩形 2" | pos = {0.1, 0.1}; size = {0.6, 1.2}
    fin: Finalize "形成联合体"

Materials
  mat1: Common "材料 1" on domains 2
    def "基本"
      relpermeability = 1
      relpermittivity = 1
      electricconductivity = 1e8
  mat3: Common "材料 3" on domains 1
    def "基本"
      relpermeability = 1
      relpermittivity = 1
      electricconductivity = 0

Physics
  mf: InductionCurrents "磁场" on all domains
    dependent variable A = {Ax, Ay, Az}
    fsp1: FreeSpace "自由空间 1" (default)
    mi1: MagneticInsulation "磁绝缘 1" (default)
    init1: init "初始值 1" (default)
    coil1: Coil "线圈 1" on domains 2 | ICoil = 180[A]
    mp1: MagneticPotential "磁势 1" on boundaries 3
    pmc1: PerfectMagneticConductor "理想磁导体 1" on boundaries 1, 2, 8

Mesh
  mesh1 "网格 1" (physics-controlled)
    size: MeshSizeDefault "大小" | hauto = 1

Studies
  std1 "研究 1"
    stat: Stationary "稳态"

Solver configurations
  sol1 "解 1" (study std1)
    v1: Variables "因变量 1"
    s1: Stationary "稳态求解器 1"
      dDef: Direct "直接"
      fc1: FullyCoupled "全耦合 1" | linsolver = dDef

Datasets
  dset1: Solution | solution = sol1

Derived values
  gev1: EvalGlobal "全局计算 1" | data = dset1

Plots
  pg1: PlotGroup2D "磁通密度模 (mf)" | data = dset1
    surf1: Surface "表面 1" | expr = mf.normB
    str1: Streamline "流线 1" on boundaries 1-8 | expr = {mf.Bx, mf.By}; udist = 0.03
      col1: Color "颜色表达式 1" | expr = mf.normB
      filt1: Filter "过滤器 1" | expr = !isScalingSystemDomain
    con1: Contour "等值线 1" | expr = mf.Az; levelrounding = off
      filt1: Filter "过滤器 1" | expr = !isScalingSystemDomain
  pg2: PlotGroup2D "A" | data = dset1
    surf1: Surface "表面 1" | expr = mf.Adepz; descr = 磁矢势，z 分量
  pg3: PlotGroup2D "二维绘图组 3" | data = dset1
    surf1: Surface "表面 1" | expr = mf.normH
    con1: Contour "等值线 1" | expr = mf.normH

Exports
  data1: Data "数据 1" | data = dset1; expr = mf.Az; descr = 磁矢势，z 分量; filename = /Users/yanzijian/Downloads/comsol/slot.txt